// SBML level 2 version 4

function Constant_flux__irreversible_0(v)
  v;
end
Constant_flux__irreversible_0 is "Constant flux (irreversible)";

function Function_modifier_1(DSB, k5)
  k5*DSB;
end

function Function_substrate_modifier_1(ATM, iChk2, k4)
  k4*iChk2*ATM;
end

function Function_modifier_2(ATM, k9)
  k9*ATM;
end

function Function_for_R15_16_1(IF, k15, k16)
  k15*IF^50/(k16^50*IF^50);
end

function Function_for_R18_19_1(DSB, k18, k19, mdm2, p53)
  k18*p53*DSB/(1 + k19*p53*mdm2);
end

function Function_modifier_3(k22, p53)
  k22*p53;
end

function Function_modifier_4(k33, p53)
  k33*p53;
end

function Function_modifier_5(k37, p53)
  k37*p53;
end

function Function_modifier_6(acMyc, k40)
  k40*acMyc;
end

function Function_substrate_modifier_2(ascf, cycd, k43)
  k43*cycd*ascf;
end

function Function_substrate_modifier_3(acyce_cdk2, k53, p27)
  k53*p27*acyce_cdk2;
end

function Function_substrate_modifier_4(acyca_cdk2, k54, p27)
  k54*p27*acyca_cdk2;
end

function Function_substrate_modifier_5(E2F_pRb, cycd_cdk4, k57)
  k57*E2F_pRb*cycd_cdk4;
end

function Function_substrate_modifier_6(E2F_pRb, k58, p27_cycd_cdk4)
  k58*E2F_pRb*p27_cycd_cdk4;
end

function Function_substrate_modifier_7(E2F_pRb, k59, p21_cycd_cdk4)
  k59*E2F_pRb*p21_cycd_cdk4;
end

function Function_substrate_modifier_8(E2F_pRbPP, acyce_cdk2, k60)
  k60*E2F_pRbPP*acyce_cdk2;
end

function Function_substrate_modifier_9(E2F_pRbPP, acyca_cdk2, k61)
  k61*E2F_pRbPP*acyca_cdk2;
end

function Function_substrate_modifier_10(acycb_cdk1_nuc, ipp1, k63)
  k63*ipp1*acycb_cdk1_nuc;
end

function Function_modifier_7(E2F, k68)
  k68*E2F;
end

function Function_modifier_8(E2F, k70)
  k70*E2F;
end

function Function_substrate_modifier_11(ascf, cyce, k74)
  k74*cyce*ascf;
end

function Function_modifier_9(E2F, k75)
  k75*E2F;
end

function Function_modifier_10(aBMyb, k76)
  k76*aBMyb;
end

function Function_modifier_11(NFY, k77)
  k77*NFY;
end

function Function_substrate_modifier_12(aAPC_Cdc20, cyca, k81)
  k81*cyca*aAPC_Cdc20;
end

function Function_substrate_modifier_13(aAPC_Cdh1, cyca, k82)
  k82*cyca*aAPC_Cdh1;
end

function Function_substrate_modifier_14(acyce_cdk2, k84)
  k84*acyce_cdk2*acyce_cdk2;
end

function Function_for_R85_86_1(aAPC_Cdc20, aAPC_Cdh1, icyca_cdk2, k85)
  k85*icyca_cdk2*(aAPC_Cdc20 + aAPC_Cdh1);
end

function Function_for_R85_86_2(aAPC_Cdc20, aAPC_Cdh1, acyca_cdk2, k86)
  k86*acyca_cdk2*(aAPC_Cdc20 + aAPC_Cdh1);
end

function Function_substrate_modifier_15(acdc25a, icyce_cdk2, k88)
  k88*icyce_cdk2*acdc25a;
end

function Function_substrate_modifier_16(acdc25a, icyca_cdk2, k90)
  k90*icyca_cdk2*acdc25a;
end

function Function_substrate_modifier_17(aAPC_Cdh1, ascf, k91)
  k91*ascf*aAPC_Cdh1;
end

function Function_substrate_modifier_18(acyce_cdk2, iscf, k92)
  k92*iscf*acyce_cdk2;
end

function Function_modifier_12(E2F, k93)
  k93*E2F;
end

function Function_substrate_modifier_19(acyca_cdk2, iBMyb, k94)
  k94*iBMyb*acyca_cdk2;
end

function Function_modifier_13(acyca_cdk2, k96)
  k96*acyca_cdk2;
end

function Function_modifier_14(E2F, k98)
  k98*E2F;
end

function Function_for_R85_86_3(acyca_cdk2, acyce_cdk2, icdc25a, k101)
  k101*icdc25a*(acyce_cdk2 + acyca_cdk2);
end

function Function_substrate_modifier_20(aChk2, icdc25a, k102)
  k102*icdc25a*aChk2;
end

function Function_substrate_modifier_21(aChk2, acdc25a, k104)
  k104*acdc25a*aChk2;
end

function Function_substrate_modifier_22(aplk1, awee1, k105)
  k105*awee1*aplk1;
end

function Function_substrate_modifier_23(ascf, iwee1, k107)
  k107*iwee1*ascf;
end

function Function_substrate_modifier_24(aChk2, icdc25c, k111)
  k111*icdc25c*aChk2;
end

function Function_for_R85_86_4(acycb_cdk1_cyto, acycb_cdk1_nuc, icdc25c, k112)
  k112*icdc25c*(acycb_cdk1_cyto + acycb_cdk1_nuc);
end

function Function_substrate_modifier_25(aplk1, icdc25c, k113)
  k113*icdc25c*aplk1;
end

function Function_substrate_modifier_26(aChk2, acdc25c, k116)
  k116*acdc25c*aChk2;
end

function Function_for_R85_86_5(acycb_cdk1_cyto, acycb_cdk1_nuc, icdc25cp_s216, k118)
  k118*icdc25cp_s216*(acycb_cdk1_cyto + acycb_cdk1_nuc);
end

function Function_substrate_modifier_27(aplk1, icdc25cp_s216, k119)
  k119*icdc25cp_s216*aplk1;
end

function Function_substrate_modifier_28(aAPC_Cdh1, aplk1, k121)
  k121*aplk1*aAPC_Cdh1;
end

function Function_substrate_modifier_29(acycb_cdk1_cyto, iplk1, k122)
  k122*iplk1*acycb_cdk1_cyto;
end

function Function_modifier_15(NFY, k123)
  k123*NFY;
end

function Function_substrate_modifier_30(gadda45, icycb_cdk1_cyto, k125)
  k125*icycb_cdk1_cyto*gadda45;
end

function Function_substrate_modifier_31(aAPC_Cdc20, cycb, k128)
  k128*cycb*aAPC_Cdc20;
end

function Function_substrate_modifier_32(aAPC_Cdh1, cycb, k129)
  k129*cycb*aAPC_Cdh1;
end

function Function_for_R85_86_6(aAPC_Cdc20, aAPC_Cdh1, icycb_cdk1_cyto, k130)
  k130*icycb_cdk1_cyto*(aAPC_Cdc20 + aAPC_Cdh1);
end

function Function_substrate_modifier_33(aAPC_Cdc20, acycb_cdk1_cyto, k131)
  k131*acycb_cdk1_cyto*aAPC_Cdc20;
end

function Function_substrate_modifier_34(aAPC_Cdh1, acycb_cdk1_cyto, k132)
  k132*acycb_cdk1_cyto*aAPC_Cdh1;
end

function Function_substrate_modifier_35(aAPC_Cdc20, cycd, k147)
  k147*cycd*aAPC_Cdc20;
end

function Function_for_R85_86_7(acdc25c, acdc25cp_s216, icycb_cdk1_cyto, k134)
  k134*icycb_cdk1_cyto*(acdc25c + acdc25cp_s216);
end

function Function_substrate_modifier_36(aAPC_Cdc20, aAPC_Cdh1, k142)
  k142*aAPC_Cdc20*aAPC_Cdh1;
end

function Function_substrate_modifier_37(acycb_cdk1_nuc, iAPC_Cdc20, k143)
  k143*iAPC_Cdc20*acycb_cdk1_nuc;
end

function Function_substrate_modifier_38(aplk1, iAPC_Cdc20, k148)
  k148*iAPC_Cdc20*aplk1;
end

function Function_substrate_modifier_39(E2F, acyca_cdk2, k146)
  k146*E2F*acyca_cdk2;
end

function Function_for_R85_86_8(aAPC_Cdc20, aAPC_Cdh1, icycb_cdk1_nuc, k139)
  k139*icycb_cdk1_nuc*(aAPC_Cdc20 + aAPC_Cdh1);
end

function Functon_for_R144_145_1(aAPC_Cdh1, acyca_cdk2, acycb_cdk1_nuc, acyce_cdk2, k144)
  k144*(acycb_cdk1_nuc + acyca_cdk2 + acyce_cdk2)*aAPC_Cdh1;
end

function function_modifier_modifier_1(app1, k64, pRbPPP)
  k64*app1*pRbPPP;
end

model Abroudi2017___Mammalian_Cell_Cycle_Control_Model()
  // Abroudi2017 - Mammalian Cell Cycle Control Model
  // Not many models of mammalian cell cycle system exist due to its complexity. Some models are too complex and hard to understand, while some others are too simple and not comprehensive enough. Moreover, some essential aspects, such as the response of G1-S and G2-M checkpoints to DNA damage as well as the growth factor signalling, have not been investigated from a systems point of view in current mammalian cell cycle models. To address these issues, we bring a holistic perspective to cell cycle by mathematically modelling it as a complex system consisting of important sub-systems that interact with each other. This retains the functionality of the system and provides a clearer interpretation to the processes within it while reducing the complexity in comprehending these processes. To achieve this, we first update a published ODE mathematical model of cell cycle with current knowledge. Then the part of the mathematical model relevant to each sub-system is shown separately in conjunction with a diagram of the sub-system as part of this representation. The model sub-systems are Growth Factor, DNA damage, G1-S, and G2-M checkpoint signalling. To further simplify the model and better explore the function of sub-systems, they are further divided into modules. Here we also add important new modules of: chk-related rapid cell cycle arrest, p53 modules expanded to seamlessly integrate with the rapid arrest module, Tyrosine phosphatase modules that activate Cyc_Cdk complexes and play a crucial role in rapid and delay arrest at both G1-S and G2-M, Tyrosine Kinase module that is important for inactivating nuclear transport of CycB_cdk1 through Wee1 to resist M phase entry, Plk1-Related module that is crucial in activating Tyrosine phosphatases and inactivating Tyrosine kinase, and APC-Related module to show steps in CycB degradation. This multi-level systems approach incorporating all known aspects of cell cycle allowed us to (i) study, through dynamic simulation of an ODE model, comprehensive details of cell cycle dynamics under normal and DNA damage conditions revealing the role and value of the added new modules and elements, (ii) assess, through a global sensitivity analysis, the most influential sub-systems, modules and parameters on system response, such as G1-S and G2-M transitions, and (iii) probe deeply into the relationship between DNA damage and cell cycle progression and test the biological evidence that G1-S is relatively inefficient in arresting damaged cells compared to G2-M checkpoint. To perform sensitivity analysis, Self-Organizing Map with Correlation Coefficient Analysis (SOMCCA) is developed which shows that Growth Factor and G1-S Checkpoint sub-systems and 13 parameters in the modules within them are crucial for G1-S and G2-M transitions. To study the relative efficiency of DNA damage checkpoints, a Checkpoint Efficiency Evaluator (CEE) is developed based on perturbation studies and statistical Type II error. Accordingly, cell cycle is about 96% efficient in arresting damaged cells with G2-M checkpoint being more efficient than G1-S. Further, both checkpoint systems are near perfect (98.6%) in passing healthy cells. Thus this study has shown the efficacy of the proposed systems approach to gain a better understanding of different aspects of mammalian cell cycle system separately and as an integrated system that will also be useful in investigating targeted therapy in future cancer treatments.

  // Compartments:
  compartment c = 1; c is "cell";

  // Species:
  species acMyc in c = 0.1;
  species icMyc in c = 0.9;
  species ATM in c = 0;
  species $DSB in c;
  species aChk2 in c = 0.01;
  species iChk2 in c = 0.99;
  species p53 in c = 0.0265;
  species mdm2 in c = 0.000235;
  species IF in c = 5;
  species p21 in c = 0;
  species cycd_cdk4 in c = 0.01;
  species p21_cycd_cdk4 in c = 0;
  species acyce_cdk2 in c = 0.001;
  species p21_acyce_cdk2 in c = 0;
  species p21_acyca_cdk2 in c = 0;
  species acyca_cdk2 in c = 0.0001;
  species _14_3_3_s in c = 2; _14_3_3_s is "14-3-3_s";
  species gadda45 in c = 0.0001;
  species cycd in c = 0.03;
  species cdk4 in c = 5;
  species ascf in c = 0.1;
  species p27 in c = 1;
  species p27_acyce_cdk2 in c = 0.1;
  species p27_acyca_cdk2 in c = 0.0001;
  species E2F in c = 0;
  species pRb in c = 0.05;
  species E2F_pRb in c = 1.95;
  species p27_cycd_cdk4 in c = 0.001;
  species E2F_pRbPP in c = 0.001;
  species pRbPPP in c = 0.01;
  species app1 in c = 0.9;
  species ipp1 in c = 0.1;
  species acycb_cdk1_nuc in c = 0;
  species cyce in c = 0.001;
  species cdk2 in c = 15;
  species cyca in c = 4e-5;
  species aBMyb in c = 0;
  species NFY in c = 0;
  species icyca_cdk2 in c = 0.0004;
  species aAPC_Cdc20 in c = 0.1;
  species aAPC_Cdh1 in c = 0.9;
  species icyce_cdk2 in c = 0.001;
  species acdc25a in c = 0.0001;
  species iscf in c = 0.9;
  species iBMyb in c = 0;
  species icdc25a in c = 0.001;
  species aplk1 in c = 0.1;
  species awee1 in c = 0.001;
  species iwee1 in c = 0;
  species acdc25c in c = 1e-6;
  species icdc25c in c = 1e-6;
  species icdc25cp_s216 in c = 0.03;
  species acycb_cdk1_cyto in c = 0.0001;
  species acdc25cp_s216 in c = 0;
  species _14_3_3_icdc25cp_s216 in c = 0.03; _14_3_3_icdc25cp_s216 is "14-3-3_icdc25cp_s216";
  species iplk1 in c = 0.9;
  species cycb in c = 0;
  species cdk1 in c = 10;
  species icycb_cdk1_cyto in c = 0.0001;
  species $DEG in c;
  species p21_acycb_cdk1_nuc in c = 0;
  species $GF in c = 1;
  species icycb_cdk1_nuc in c = 0;
  species iAPC_Cdc20 in c = 0.9;
  species iAPC_Cdh1 in c = 0.1;
  species pRbPPP_copy in c = 0.01;

  // Parameters:
  k1 = 0.001;
  k2 = 0.01;
  k3 = 1;
  k4 = 1;
  k5 = 0.2;
  k6 = 0.01;
  k7 = 1e-8;
  k8 = 0.0001;
  k9 = 0.07;
  k10 = 0.001;
  k11 = 0.0556;
  k12 = 0.772;
  k13 = 0.02;
  k14 = 0.00094;
  k15 = 10;
  k16 = 9.5;
  k17 = 0.02;
  k18 = 6;
  k19 = 0.004;
  k20 = 0.005;
  k21 = 5e-5;
  k22 = 0.001;
  k23 = 0.005;
  k24 = 0.0005;
  k25 = 0.000175;
  k26 = 0.0225;
  k27 = 0.000175;
  k28 = 0.0025;
  k29 = 0.000175;
  k30 = 0.0225;
  k31 = 0.005;
  k32 = 1;
  k33 = 0.01;
  k34 = 1;
  k35 = 100;
  k36 = 1e-5;
  k37 = 0.0001;
  k38 = 1e-6;
  k39 = 1e-5;
  k40 = 0.003;
  k41 = 0.0025;
  k42 = 0.08;
  k43 = 0.2;
  k44 = 5e-5;
  k45 = 8e-5;
  k46 = 0.001;
  k47 = 0.0005;
  k48 = 0.009;
  k49 = 0.0015;
  k50 = 0.000175;
  k51 = 0.000175;
  k52 = 0.0225;
  k53 = 0.05;
  k54 = 0.0015;
  k55 = 0.0025;
  k56 = 0.05;
  k57 = 0.0025;
  k58 = 0.0025;
  k59 = 0.0025;
  k60 = 0.04;
  k61 = 0.0025;
  k62 = 0.001;
  k63 = 0.05;
  k64 = 0.005;
  k65 = 5e-5;
  k66 = 5e-5;
  k67 = 0.0005;
  k68 = 5e-8;
  k69 = 0.0005;
  k70 = 0.1;
  k71 = 0.0025;
  k72 = 2.5e-5;
  k73 = 0.0025;
  k74 = 0.01;
  k75 = 8e-5;
  k76 = 0.0002;
  k77 = 1e-6;
  k78 = 0.0002;
  k79 = 0.0005;
  k80 = 0.0005;
  k81 = 0.005;
  k82 = 0.005;
  k83 = 0.005;
  k84 = 0.05;
  k85 = 0.005;
  k86 = 0.0075;
  k87 = 0.00175;
  k88 = 0.006;
  k89 = 5e-5;
  k90 = 0.0009;
  k91 = 0.015;
  k92 = 0.01;
  k93 = 0.05;
  k94 = 0.05;
  k95 = 0.002;
  k96 = 0.001;
  k97 = 0.005;
  k98 = 0.04;
  k99 = 0.005;
  k100 = 0.005;
  k101 = 0.05;
  k102 = 0.001;
  k103 = 0.0005;
  k104 = 0.001;
  k105 = 0.1;
  k106 = 1;
  k107 = 1;
  k108 = 0.0002;
  k109 = 1e-5;
  k110 = 0.01;
  k111 = 0.001;
  k112 = 1;
  k113 = 0.01;
  k114 = 0.01;
  k115 = 0.0001;
  k116 = 0.001;
  k117 = 0.01;
  k118 = 1;
  k119 = 0.1;
  k120 = 1;
  k121 = 0.1;
  k122 = 0.015;
  k123 = 0.02;
  k124 = 1e-5;
  k125 = 0.0002;
  k126 = 0.005;
  k127 = 0.00125;
  k128 = 0.001;
  k129 = 0.3;
  k130 = 0.005;
  k131 = 0.005;
  k132 = 0.05;
  k133 = 0.0001;
  DDS = 0.012;
  k134 = 0.05;
  k135 = 5e-5;
  k136 = 0.01;
  k137 = 0.0005;
  k138 = 0.01;
  k139 = 0.005;
  k140 = 0.005;
  k141 = 0.03;
  k142 = 0.05;
  k143 = 0.01;
  k144 = 0.1;
  k145 = 0.005;
  k146 = 0.01;
  k147 = 10;
  k148 = 0.0001;

  // Assignment rules:
  DSB := DDS*exp(-k7*time);
  DEG := k11 - k12*(DSB - DDS*exp(-k13*DDS*time));

  // Reactions:
  R1_2_Activation_of_Myc: acMyc => icMyc; c*k1*acMyc;
  R6_ATM_degradation: ATM => ; c*k6*ATM;
  R5_ATM_synthesis_mediated_by_Double_Strand_Break_DSB: => ATM; c*Function_modifier_1(DSB, k5);  // modifiers: DSB
  R3_Inactivation_of_Chk2: aChk2 => iChk2; c*k3*aChk2;
  R4_Activation_of_Chk2: iChk2 => aChk2; c*Function_substrate_modifier_1(ATM, iChk2, k4);  // modifiers: ATM
  R8_p53_synthesis: => p53; c*Constant_flux__irreversible_0(k8);
  R10_p53_degradation: p53 => ; c*k10*p53;
  R9_p53_synthesis_mediated_by_ATM: => p53; c*Function_modifier_2(ATM, k9);  // modifiers: ATM
  R17_degradation_of_mdm2: mdm2 => ; c*k17*mdm2;
  R14_mdm2_synthesis: => mdm2; c*Constant_flux__irreversible_0(k14);
  R15_16_Mdm2_synthesis_mediated_by_IF: => mdm2; c*Function_for_R15_16_1(IF, k15, k16);  // modifiers: IF
  R18_19_IF_synthesis_mediated_by: => IF; c*Function_for_R18_19_1(DSB, k18, k19, mdm2, p53);  // modifiers: p53, DSB, mdm2
  R20_IF_degradation: IF => ; c*k20*IF;
  R21_p21_synthesis: => p21; c*Constant_flux__irreversible_0(k21);
  R22_p21_synth_through_p53: => p21; c*Function_modifier_3(k22, p53);  // modifiers: p53
  R24_23_p21_cycd_cdk4_dissociation: p21_cycd_cdk4 -> p21 + cycd_cdk4; c*(k23*p21_cycd_cdk4 - k24*p21*cycd_cdk4);
  R26_25_p21_acyce_cdk2_dissociation: p21_acyce_cdk2 -> p21 + acyce_cdk2; c*(k25*p21_acyce_cdk2 - k26*p21*acyce_cdk2);
  R28_27_p21_acyca_cdk2_dissociation: p21_acyca_cdk2 -> p21 + acyca_cdk2; c*(k27*p21_acyca_cdk2 - k28*p21*acyca_cdk2);
  R30_29_p21_acycb_cdk1_dissociation: p21_acycb_cdk1_nuc -> p21 + acycb_cdk1_nuc; c*(k29*p21_acycb_cdk1_nuc - k30*p21*acycb_cdk1_nuc);
  R31_p21_degradation: p21 => ; c*k31*p21;
  R32: => _14_3_3_s; c*Constant_flux__irreversible_0(k32);
  R33: => _14_3_3_s; c*Function_modifier_4(k33, p53);  // modifiers: p53
  R34: _14_3_3_s => ; c*k34*_14_3_3_s;
  R35: _14_3_3_s + icdc25cp_s216 => _14_3_3_icdc25cp_s216; c*k35*_14_3_3_s*icdc25cp_s216;
  R36: => gadda45; c*Constant_flux__irreversible_0(k36);
  R37: => gadda45; c*Function_modifier_5(k37, p53);  // modifiers: p53
  R38: gadda45 => ; c*k38*gadda45;
  R39: => cycd; c*Constant_flux__irreversible_0(k39);
  R40: => cycd; c*Function_modifier_6(acMyc, k40);  // modifiers: acMyc
  R42_41: cycd_cdk4 -> cycd + cdk4; c*(k41*cycd_cdk4 - k42*cycd*cdk4);
  R43: cycd => ; c*Function_substrate_modifier_2(ascf, cycd, k43);  // modifiers: ascf
  R44: cycd => ; c*k44*cycd;
  R45_CycD_degradation: cycd_cdk4 => cdk4; c*k45*cycd_cdk4;
  R46_p27_and_CycD_degradation: p27_cycd_cdk4 => cdk4; c*k46*p27_cycd_cdk4;
  R47_48_p27_CyclinD_Cdk4_dissociation: p27_cycd_cdk4 -> p27 + cycd_cdk4; c*(k47*p27_cycd_cdk4 - k48*p27*cycd_cdk4);
  R49_Synthesis_p27_basal: => p27; c*Constant_flux__irreversible_0(k49);
  R50_52_Dissociation_p27_aCyclinE_Cdk2: p27_acyce_cdk2 -> p27 + acyce_cdk2; c*(k50*p27_acyce_cdk2 - k52*p27*acyce_cdk2);
  R51_Dissociation_p27_aCyclinA_Cdk2: p27_acyca_cdk2 => p27 + acyca_cdk2; c*k51*p27_acyca_cdk2;
  R53_Degradation_of_p27_through_aCyclinE_Cdk2: p27 => ; c*Function_substrate_modifier_3(acyce_cdk2, k53, p27);  // modifiers: acyce_cdk2
  R54_Degradation_of_p27_through_aCyclinA_Cdk2: p27 => ; c*Function_substrate_modifier_4(acyca_cdk2, k54, p27);  // modifiers: acyca_cdk2
  R55_Association_of_p27_with_aCyclinA_Cdk2: p27 + acyca_cdk2 => p27_acyca_cdk2; c*k55*p27*acyca_cdk2;
  R56_Association_of_pRb_and_E2F: pRb + E2F => E2F_pRb; c*k56*pRb*E2F;
  R57: E2F_pRb => E2F_pRbPP; c*Function_substrate_modifier_5(E2F_pRb, cycd_cdk4, k57);  // modifiers: cycd_cdk4
  R58: E2F_pRb => ; c*Function_substrate_modifier_6(E2F_pRb, k58, p27_cycd_cdk4);  // modifiers: p27_cycd_cdk4
  R59: E2F_pRb => E2F_pRbPP; c*Function_substrate_modifier_7(E2F_pRb, k59, p21_cycd_cdk4);  // modifiers: p21_cycd_cdk4
  R60: E2F_pRbPP => E2F + pRbPPP; c*Function_substrate_modifier_8(E2F_pRbPP, acyce_cdk2, k60);  // modifiers: acyce_cdk2
  R61: E2F_pRbPP => E2F + pRbPPP; c*Function_substrate_modifier_9(E2F_pRbPP, acyca_cdk2, k61);  // modifiers: acyca_cdk2
  R62: app1 => ipp1; c*k62*app1;
  R63: ipp1 => app1; c*Function_substrate_modifier_10(acycb_cdk1_nuc, ipp1, k63);  // modifiers: acycb_cdk1_nuc
  R64_1: pRbPPP => ; c*k64*pRbPPP;
  R65: => pRb; c*Constant_flux__irreversible_0(k65);
  R66: pRb => ; c*k66*pRb;
  R67: => E2F; c*Constant_flux__irreversible_0(k67);
  R68: => E2F; c*Function_modifier_7(E2F, k68);
  R69: E2F => ; c*k69*E2F;
  R70: => cyce; c*Function_modifier_8(E2F, k70);  // modifiers: E2F
  R71: cyce + cdk2 => icyce_cdk2; c*k71*cyce*cdk2;
  R72: icyce_cdk2 => cyce + cdk2; c*k72*icyce_cdk2;
  R73: cyce => ; c*k73*cyce;
  R74: cyce => ; c*Function_substrate_modifier_11(ascf, cyce, k74);  // modifiers: ascf
  R75: => cyca; c*Function_modifier_9(E2F, k75);  // modifiers: E2F
  R76: => cyca; c*Function_modifier_10(aBMyb, k76);  // modifiers: aBMyb
  R77: => cyca; c*Function_modifier_11(NFY, k77);  // modifiers: NFY
  R78: icyca_cdk2 => cyca + cdk2; c*k78*icyca_cdk2;
  R79: cyca => ; c*k79*cyca;
  R80: cyca + cdk2 => icyca_cdk2; c*k80*cyca*cdk2;
  R81: cyca => ; c*Function_substrate_modifier_12(aAPC_Cdc20, cyca, k81);  // modifiers: aAPC_Cdc20
  R82: cyca => ; c*Function_substrate_modifier_13(aAPC_Cdh1, cyca, k82);  // modifiers: aAPC_Cdh1
  R83: icyce_cdk2 => cdk2; c*k83*icyce_cdk2;
  R84: acyce_cdk2 => cdk2; c*Function_substrate_modifier_14(acyce_cdk2, k84);
  R85: icyca_cdk2 => cdk2; c*Function_for_R85_86_1(aAPC_Cdc20, aAPC_Cdh1, icyca_cdk2, k85);  // modifiers: aAPC_Cdc20, aAPC_Cdh1
  R86: acyca_cdk2 => cdk2; c*Function_for_R85_86_2(aAPC_Cdc20, aAPC_Cdh1, acyca_cdk2, k86);  // modifiers: aAPC_Cdc20, aAPC_Cdh1
  R87: acyce_cdk2 => icyce_cdk2; c*k87*acyce_cdk2;
  R88: icyce_cdk2 => acyce_cdk2; c*Function_substrate_modifier_15(acdc25a, icyce_cdk2, k88);  // modifiers: acdc25a
  R89: acyca_cdk2 => icyca_cdk2; c*k89*acyca_cdk2;
  R90: icyca_cdk2 => acyca_cdk2; c*Function_substrate_modifier_16(acdc25a, icyca_cdk2, k90);  // modifiers: acdc25a
  R91: ascf => iscf; c*Function_substrate_modifier_17(aAPC_Cdh1, ascf, k91);  // modifiers: aAPC_Cdh1
  R92: iscf => ascf; c*Function_substrate_modifier_18(acyce_cdk2, iscf, k92);  // modifiers: acyce_cdk2
  R93: => iBMyb; c*Function_modifier_12(E2F, k93);  // modifiers: E2F
  R94: iBMyb => aBMyb; c*Function_substrate_modifier_19(acyca_cdk2, iBMyb, k94);  // modifiers: acyca_cdk2
  R95: aBMyb => ; c*k95*aBMyb;
  R96: => NFY; c*Function_modifier_13(acyca_cdk2, k96);  // modifiers: acyca_cdk2
  R97: NFY => ; c*k97*NFY;
  R98: => icdc25a; c*Function_modifier_14(E2F, k98);  // modifiers: E2F
  R99: acdc25a => icdc25a; c*k99*acdc25a;
  R100: icdc25a => ; c*k100*icdc25a;
  R101: icdc25a => acdc25a; c*Function_for_R85_86_3(acyca_cdk2, acyce_cdk2, icdc25a, k101);  // modifiers: acyce_cdk2, acyca_cdk2
  R102: icdc25a => ; c*Function_substrate_modifier_20(aChk2, icdc25a, k102);  // modifiers: aChk2
  R103: acdc25a => ; c*k103*acdc25a;
  R104: acdc25a => ; c*Function_substrate_modifier_21(aChk2, acdc25a, k104);  // modifiers: aChk2
  R105: awee1 => iwee1; c*Function_substrate_modifier_22(aplk1, awee1, k105);  // modifiers: aplk1
  R106: iwee1 => awee1; c*k106*iwee1;
  R107: iwee1 => ; c*Function_substrate_modifier_23(ascf, iwee1, k107);  // modifiers: ascf
  R108: => awee1; c*Constant_flux__irreversible_0(k108);
  R109: => icdc25c; c*Constant_flux__irreversible_0(k109);
  R110: acdc25c => icdc25c; c*k110*acdc25c;
  R111: icdc25c => icdc25cp_s216; c*Function_substrate_modifier_24(aChk2, icdc25c, k111);  // modifiers: aChk2
  R112: icdc25c => acdc25c; c*Function_for_R85_86_4(acycb_cdk1_cyto, acycb_cdk1_nuc, icdc25c, k112);  // modifiers: acycb_cdk1_cyto, acycb_cdk1_nuc
  R113: icdc25c => acdc25c; c*Function_substrate_modifier_25(aplk1, icdc25c, k113);  // modifiers: aplk1
  R114: acdc25cp_s216 => acdc25c; c*k114*acdc25cp_s216;
  R115: acdc25c => ; c*k115*acdc25c;
  R116: acdc25c => acdc25cp_s216; c*Function_substrate_modifier_26(aChk2, acdc25c, k116);  // modifiers: aChk2
  R117: acdc25cp_s216 => icdc25cp_s216; c*k117*acdc25cp_s216;
  R118: icdc25cp_s216 => acdc25cp_s216; c*Function_for_R85_86_5(acycb_cdk1_cyto, acycb_cdk1_nuc, icdc25cp_s216, k118);  // modifiers: acycb_cdk1_cyto, acycb_cdk1_nuc
  R119: icdc25cp_s216 => acdc25cp_s216; c*Function_substrate_modifier_27(aplk1, icdc25cp_s216, k119);  // modifiers: aplk1
  R120: _14_3_3_icdc25cp_s216 => ; c*k120*_14_3_3_icdc25cp_s216;
  R121: aplk1 => iplk1; c*Function_substrate_modifier_28(aAPC_Cdh1, aplk1, k121);  // modifiers: aAPC_Cdh1
  R122: iplk1 => aplk1; c*Function_substrate_modifier_29(acycb_cdk1_cyto, iplk1, k122);  // modifiers: acycb_cdk1_cyto
  R123: => cycb; c*Function_modifier_15(NFY, k123);  // modifiers: NFY
  R124: icycb_cdk1_cyto => cycb + cdk1; c*k124*icycb_cdk1_cyto;
  R125: icycb_cdk1_cyto => cycb + cdk1; c*Function_substrate_modifier_30(gadda45, icycb_cdk1_cyto, k125);  // modifiers: gadda45
  R126: cycb => ; c*k126*cycb;
  R127: cycb + cdk1 => icycb_cdk1_cyto; c*k127*cycb*cdk1;
  R128: cycb => ; c*Function_substrate_modifier_31(aAPC_Cdc20, cycb, k128);  // modifiers: aAPC_Cdc20
  R129: cycb => ; c*Function_substrate_modifier_32(aAPC_Cdh1, cycb, k129);  // modifiers: aAPC_Cdh1
  R130: icycb_cdk1_cyto => cdk1; c*Function_for_R85_86_6(aAPC_Cdc20, aAPC_Cdh1, icycb_cdk1_cyto, k130);  // modifiers: aAPC_Cdc20, aAPC_Cdh1
  R131: acycb_cdk1_cyto => cdk1; c*Function_substrate_modifier_33(aAPC_Cdc20, acycb_cdk1_cyto, k131);  // modifiers: aAPC_Cdc20
  R132: acycb_cdk1_cyto => cdk1; c*Function_substrate_modifier_34(aAPC_Cdh1, acycb_cdk1_cyto, k132);  // modifiers: aAPC_Cdh1
  R133: acycb_cdk1_cyto => icycb_cdk1_cyto; c*k133*acycb_cdk1_cyto;
  R7: $DSB => ; c*k7*DSB;
  R2: icMyc + $GF => acMyc + $GF; c*k2*icMyc*GF;
  R147: cycd => ; c*Function_substrate_modifier_35(aAPC_Cdc20, cycd, k147);  // modifiers: aAPC_Cdc20
  R134: icycb_cdk1_cyto => acycb_cdk1_cyto; c*Function_for_R85_86_7(acdc25c, acdc25cp_s216, icycb_cdk1_cyto, k134);  // modifiers: acdc25c, acdc25cp_s216
  R135: acycb_cdk1_nuc => acycb_cdk1_cyto; c*k135*acycb_cdk1_nuc;
  R136: acycb_cdk1_cyto + aplk1 => acycb_cdk1_nuc + aplk1; c*k136*acycb_cdk1_cyto*aplk1;
  R138: icycb_cdk1_nuc + acdc25c => acycb_cdk1_nuc + acdc25c; c*k138*icycb_cdk1_nuc*acdc25c;
  R137: awee1 + acycb_cdk1_nuc => icycb_cdk1_nuc + awee1; c*k137*awee1*acycb_cdk1_nuc;
  R140: aAPC_Cdc20 + acycb_cdk1_nuc => aAPC_Cdc20; c*k140*aAPC_Cdc20*acycb_cdk1_nuc;
  R141: aAPC_Cdh1 + acycb_cdk1_nuc => aAPC_Cdh1; c*k141*aAPC_Cdh1*acycb_cdk1_nuc;
  R142: aAPC_Cdc20 => iAPC_Cdc20; c*Function_substrate_modifier_36(aAPC_Cdc20, aAPC_Cdh1, k142);  // modifiers: aAPC_Cdh1
  R143: iAPC_Cdc20 => aAPC_Cdc20; c*Function_substrate_modifier_37(acycb_cdk1_nuc, iAPC_Cdc20, k143);  // modifiers: acycb_cdk1_nuc
  R148: iAPC_Cdc20 => aAPC_Cdc20; c*Function_substrate_modifier_38(aplk1, iAPC_Cdc20, k148);  // modifiers: aplk1
  p53_DEG_degradation: p53 + mdm2 + $DEG => mdm2 + $DEG; c*p53_DEG_degradation_k1*p53*mdm2*DEG;
    p53_DEG_degradation_k1 = 1;
  R146: E2F => ; c*Function_substrate_modifier_39(E2F, acyca_cdk2, k146);  // modifiers: acyca_cdk2
  R139: icycb_cdk1_nuc => ; c*Function_for_R85_86_8(aAPC_Cdc20, aAPC_Cdh1, icycb_cdk1_nuc, k139);  // modifiers: aAPC_Cdc20, aAPC_Cdh1
  R144: aAPC_Cdh1 => iAPC_Cdh1; c*Functon_for_R144_145_1(aAPC_Cdh1, acyca_cdk2, acycb_cdk1_nuc, acyce_cdk2, k144);  // modifiers: acycb_cdk1_nuc, acyca_cdk2, acyce_cdk2
  R145: iAPC_Cdh1 => aAPC_Cdh1; c*k145*iAPC_Cdh1;
  R64_2: => pRb; c*function_modifier_modifier_1(app1, k64, pRbPPP);  // modifiers: app1, pRbPPP

  // Unit definitions:
  unit volume = 1e-3 litre;
  unit substance = 1e-3 mole;
end
