// SBML level 2 version 4

model Konrath2020_p53_subpopulation_c()

  // Compartments:
  compartment nucl = 1;

  // Species:
  species p53 in nucl = 4.291111;
  species p53a in nucl = 0;
  species Mdm2_mRNA in nucl = 40.97029;
  species Mdm2 in nucl = 97.13353;
  species Wip1_mRNA in nucl = 9.989375e-11;
  species Wip1 in nucl = 5.922026e-12;
  species pATM in nucl = 0; pATM is "ATM-P";

  // Parameters:
  Ts = 30.63971;
  Tw = 13.25503;
  am = 1;
  ampa = 0.08017683;
  ampi = 0.005435861;
  amt = 0.5201303;
  api = 1e-10;
  as = 1e-10;
  asm = 14.66185;
  aw = 1;
  awpa = 2.417744;
  aws = 9998.037;
  awt = 1;
  bmt = 21.30989;
  bmt_fcc = 1;
  bmtm = 2.370828;
  bmtm_fcc = 1;
  bp = 2.306561;
  bp_fcc = 0.982296;
  bpamt = 96.45908;
  bpawt = 13.42843;
  bs = 1.912288;
  bs_fcc = 0.9926985;
  bsp = 9999.579;
  bwt = 1e-10;
  bwt_fcc = 1;
  bwtw = 0.06587966;
  bwtw_fcc = 0.8986153;
  init_Mdm2 = 0;
  init_Mdm2_mRNA = 0;
  init_Wip1 = 0;
  init_Wip1_mRNA = 0;
  init_p53 = 0;
  init_p53a = 0;
  init_pATM = 0;
  ns = 4;
  nw = 4;
  offset = 21.23976;
  scale_p53 = 149.1157;

  // Assignment rules:
  damage := 1;
  p53_obs := log10(offset + scale_p53*(p53 + p53a));

  // Reactions:
  reaction1: => p53; bp*bp_fcc;
  reaction2: => p53; Wip1*awpa*p53a;  // modifiers: Wip1, p53a
  reaction3: p53 => ; api*p53;
  reaction4: p53 => ; Mdm2*ampi*p53;  // modifiers: Mdm2
  reaction5: p53 => ; bsp*p53*pATM^ns/(Ts^ns + pATM^ns);  // modifiers: pATM
  reaction6: => p53a; bsp*p53*pATM^ns/(Ts^ns + pATM^ns);  // modifiers: p53, pATM
  reaction7: p53a => ; Mdm2*ampa*p53a;  // modifiers: Mdm2
  reaction8: p53a => ; Wip1*awpa*p53a;  // modifiers: Wip1
  reaction9: => Mdm2_mRNA; bpamt*p53a;  // modifiers: p53a
  reaction10: => Mdm2_mRNA; bmt*bmt_fcc;
  reaction11: Mdm2_mRNA => ; Mdm2_mRNA*amt;
  reaction12: => Mdm2; Mdm2_mRNA*bmtm*bmtm_fcc;  // modifiers: Mdm2_mRNA
  reaction13: Mdm2 => ; Mdm2*asm*pATM;  // modifiers: pATM
  reaction14: Mdm2 => ; Mdm2*am;
  reaction15: => Wip1_mRNA; bpawt*p53a;  // modifiers: p53a
  reaction16: => Wip1_mRNA; bwt*bwt_fcc;
  reaction17: Wip1_mRNA => ; Wip1_mRNA*awt;
  reaction18: => Wip1; Wip1_mRNA*bwtw*bwtw_fcc;  // modifiers: Wip1_mRNA
  reaction19: Wip1 => ; Wip1*aw;
  reaction20: => pATM; bs*bs_fcc*damage;
  reaction21: pATM => ; Wip1^nw*aws*pATM/(Tw^nw + Wip1^nw);  // modifiers: Wip1
  reaction22: pATM => ; as*pATM;

  // Unit definitions:
  unit time = 3600 second;
end
