// SBML level 2 version 4

function Constant_flux__irreversible(v)
  v;
end
Constant_flux__irreversible is "Constant flux (irreversible)";

function GAPD_0(S, k, I, A, ki, B)
  S*k/(1 + I/(A/(A + B*2)*ki));
end

function TKT_TLD(k, S1, S2, P1, P2, km, k2)
  k*(S1*S2 - P1*P2/k2)/(1 + S1*S2/km + P1*P2/km);
end
TKT_TLD is "TKT/TLD";

function MA_inhib__reversible(k, S, P, k2, I, ki)
  k*(S - P/k2)/(1 + I/ki);
end
MA_inhib__reversible is "MA+inhib (reversible)";

function MA_inhib__irreversible(k, S, I, ki)
  k*S/(1 + I/ki);
end
MA_inhib__irreversible is "MA+inhib (irreversible)";

function MA__reversible(k, S, P, k2)
  k*(S - P/k2);
end
MA__reversible is "MA (reversible)";

function GPx_0(k, S1, S2, km1, km2)
  k/(km1/S1 + km2/S2);
end

function GR_0(k, S1, S2, km1, km2)
  k/(1 + km1/S1 + km2/S2);
end

function ALD_0(k, S, P1, P2, k2)
  k*(S - P1*P2/k2);
end

function G6PD_0(k, S1, S2, I, ki)
  k*S1*S2/(1 + I/ki);
end

function _6PGD_0(k, S1, S2, km, I, ki)
  k*S1*S2/(1 + S1/km + I/ki);
end

function H2O2prod(V, kdiff, S, P)
  V + kdiff*(S - P);
end

function PRPPs_0(k, S, Km)
  k*S/(1 + S/Km);
end

model New_Model()
  // Hurbain2022 - Oxidative Stress Response model
  // Metabolic network describing oxidative stress response by a mathematical model with a data-driven parameter estimation (from Kuehne2015).
  // hasProperty mamo:MAMO_0000040

  // Compartments:
  compartment compartment = 1;

  // Species:
  species G6P in compartment = 4.952;
  species Glc in compartment = 437.853;
  species Ru5P in compartment = 7.122;
  species _6PG in compartment = 24.96;
  species _6PGL in compartment = 0.952;
  species R5P in compartment = 8.315;
  species NADPp in compartment = 15.081;
  species S7P in compartment = 0.076;
  species H2O2 in compartment = 0.521;
  species X5P in compartment = 2.946;
  species NADPH in compartment = 14.919;
  species GAP in compartment = 171.858;
  species E4P in compartment = 2.59;
  species GSSG in compartment = 148.6041;
  species F6P in compartment = 1.006;
  species FBP in compartment = 31.128;
  species GSH in compartment = 2702.6;
  species DHAP in compartment = 9.696;
  species $H2O2ext in compartment = 500;

  // Reactions:
  HK: Glc => G6P; compartment*MA_inhib__irreversible(HK_k, Glc, G6P, HK_ki);
    HK_k = 0.0914; HK_ki = 58762;
  G6PD: G6P + NADPp => _6PGL + NADPH; compartment*G6PD_0(G6PD_k, G6P, NADPp, NADPH, G6PD_ki);
    G6PD_k = 1.8574; G6PD_ki = 1.0995;
  PRPPs: R5P => ; compartment*PRPPs_0(PRPPs_k, R5P, Km);
    PRPPs_k = 0.7223; Km = 64.998;
  GLase: _6PGL => _6PG; compartment*GLase_k1*_6PGL;
    GLase_k1 = 10.0046;
  NHN: NADPH => NADPp; compartment*MA_inhib__irreversible(NHN_k, NADPH, H2O2, NHN_ki);  // modifiers: H2O2
    NHN_k = 0.0604; NHN_ki = 351.156;
  _6PGD: _6PG + NADPp => Ru5P + NADPH; compartment*_6PGD_0(_6PGD_k, _6PG, NADPp, _6PGD_km, NADPH, _6PGD_ki);
    _6PGD_k = 0.0431; _6PGD_km = 50.0035; _6PGD_ki = 72.5605;
  RPE: Ru5P -> X5P; compartment*MA__reversible(RPE_k, Ru5P, X5P, RPE_k2);
    RPE_k = 0.5212; RPE_k2 = 1.68;
  TKT2: E4P + X5P -> F6P + GAP; compartment*TKT_TLD(TKT2_k, E4P, X5P, F6P, GAP, TKT2_km, TKT2_k2);
    TKT2_k = 0.7459; TKT2_km = 99586; TKT2_k2 = 30.0608;
  H2O2diff: $H2O2ext -> H2O2; compartment*H2O2prod(V, kdiff, H2O2ext, H2O2);
    V = 82.1486; kdiff = 0.2016;
  PGI: G6P -> F6P; compartment*MA_inhib__reversible(PGI_k, G6P, F6P, PGI_k2, _6PG, PGI_ki);  // modifiers: _6PG
    PGI_k = 36.1826; PGI_k2 = 0.34; PGI_ki = 18.26;
  RPI: Ru5P -> R5P; compartment*MA__reversible(RPI_k, Ru5P, R5P, RPI_k2);
    RPI_k = 18.5439; RPI_k2 = 1.23;
  PFK: F6P => FBP; compartment*PFK_k1*F6P;
    PFK_k1 = 75.5092;
  GAPD: GAP => ; compartment*GAPD_0(GAP, GAPD_k, H2O2, GSH, GAPD_ki, GSSG);  // modifiers: H2O2, GSH, GSSG
    GAPD_k = 0.2652; GAPD_ki = 11.0205;
  TkT1: R5P + X5P -> S7P + GAP; compartment*TKT_TLD(TkT1_k, R5P, X5P, S7P, GAP, TkT1_km, TkT1_k2);
    TkT1_k = 0.4235; TkT1_km = 9.482; TkT1_k2 = 1.6199;
  GR: GSSG + NADPH => 2 GSH + NADPp; compartment*GR_0(GR_k, GSSG, NADPH, GR_km1, GR_km2);
    GR_k = 400.959; GR_km1 = 564.417; GR_km2 = 1.389;
  GPx: H2O2 + 2 GSH => GSSG; compartment*GPx_0(GPx_k, H2O2, GSH, GPx_km1, GPx_km2);
    GPx_k = 2.3736; GPx_km1 = 0.0099; GPx_km2 = 26.687;
  CAT: H2O2 => ; compartment*CAT_k1*H2O2;
    CAT_k1 = 0.0879;
  TLD: S7P + GAP -> E4P + F6P; compartment*TKT_TLD(TLD_k, S7P, GAP, E4P, F6P, TLD_km, TLD_k2);
    TLD_k = 9.0949; TLD_km = 0.4227; TLD_k2 = 0.36;
  TPI: DHAP -> GAP; compartment*MA__reversible(TPI_k, DHAP, GAP, TPI_k2);
    TPI_k = 44.6889; TPI_k2 = 19.1999;
  FBPase: FBP => F6P; compartment*FBPase_k1*FBP;
    FBPase_k1 = 1.3709;
  ALD: FBP -> GAP + DHAP; compartment*ALD_0(ALD_k, FBP, GAP, DHAP, ALD_k2);
    ALD_k = 5.6572; ALD_k2 = 65.9933;
  NNH: NADPp => NADPH; compartment*NNH_k1*NADPp;
    NNH_k1 = 4.2345;
  GLCin: => Glc; compartment*Constant_flux__irreversible(v);
    v = 40;

  // Unit definitions:
  unit substance = 1e-6 mole;
  unit length = metre;
  unit area = metre^2;
  unit volume = litre;
  unit time = second;
end
